module tape;
module residential {
    implicit_enduses NONE;
};
module powerflow;
module climate;

#include "typical_light_yearly.glm";
#include "typical_fridge_yearly.glm";
#include "typical_misc_appliances_yearly.glm";
module generators;

clock {
    timezone PST+9DT;
    starttime '2024-07-01 00:00:00';
    stoptime '2024-07-14 23:59:00';
}


object csv_reader {
    name climate_reader_3f29c3b1;
    filename "murcia.csv";
}

object climate {
    tmyfile "murcia.csv";
    reader climate_reader_3f29c3b1;

};


schedule wh_demand {

    * 0-4 * * * 0;

    0-9 5 * * * 1;

    10-59 5 * * * 0;

    * 6 * * * 0.5;

    0-29 7 * * * 1;

    30-59 7 * * * 0.5;

    * 8-17 * * * 0;

    0-14 18 * * * 0.8;

    15-29 18 * * * 1;

    30-59 18 * * * 0.5;

    * 19-20 * * * 0.3;

    0-29 21 * * * 0.5;

    30-59 21 * * * 0;

    * 22-23 * * * 0;

}


object triplex_meter {
    name meter1;
    phases AS;
    nominal_voltage 120;


    object inverter {
        name inverter1;
        generator_status ONLINE;
        phases S;
        parent meter1;
        inverter_type FOUR_QUADRANT;
        //four_quadrant_control_mode CONSTANT_PF;
        power_factor 1.0;
        generator_mode SUPPLY_DRIVEN;

        object solar {
            name house_solar;
            parent inverter1;
            generator_mode SUPPLY_DRIVEN;
            generator_status ONLINE;
            panel_type SINGLE_CRYSTAL_SILICON;
            tilt_angle 30.0;           // 30 degrees (standard roof pitch)
            orientation_azimuth 180;
            efficiency 0.212;
            area 259.40999;
            SOLAR_TILT_MODEL SOLPOS;
            SOLAR_POWER_MODEL FLATPLATE;
        };
    };


    object house {
        name house;
        heating_setpoint 68.0;
        cooling_setpoint 80.6;
        system_mode OFF;
        cooling_system_type ELECTRIC;
        design_cooling_setpoint 82.4;
        design_cooling_capacity 17231;
        cooling_COP 2.48;
        heating_system_type HEAT_PUMP;
        design_heating_setpoint 64.4;
        design_heating_capacity 17231;
        heating_COP 2.98;
        thermostat_deadband 2.7;
        floor_area 1722.224;
        number_of_stories 4;
        ceiling_height 8.2021;
        envelope_UA 341.154;
        window_wall_ratio 0.18;
        number_of_doors 3;
        Rwall 90.852208;
        Rwindows 9.198786060000002;
        Rroof 113.56526000000001;
        Rfloor 107.88699700000001;
        glazing_layers 1;


        object waterheater {
            name main_wh;
            tank_volume 37.512424;
            tank_UA 3.7906;
            tank_setpoint 131.0;
            heating_element_capacity 4.5;
            location INSIDE;
            heat_mode ELECTRIC;
            water_demand wh_demand*1;
            impedance_fraction 0.7;
            power_fraction 0.3;
            power_factor 0.96;
        };


        object ZIPload {
            name indoor_lights;
            parent house;
            base_power yearly_lighting*0.8;
            power_pf 0.95;
            heatgain_fraction 1.0;
            impedance_fraction 0.0;
            current_fraction 0.0;
            power_fraction 1.0;
            is_240 FALSE;
        };

        object ZIPload {
            name exterior_lights;
            parent house;
            base_power yearly_lighting*0.3;
            power_pf 0.95;
            heatgain_fraction 1.0;
            impedance_fraction 0.0;
            current_fraction 0.0;
            power_fraction 1.0;
            is_240 FALSE;
        };


        object ZIPload {
            name misc_appliances;
            parent house;
            base_power yearly_misc_appliances*0.8;
            power_pf 0.95;
            heatgain_fraction 0.3;
            impedance_fraction 0.1;
            current_fraction 0.0;
            power_fraction 0.9;
            is_240 FALSE;
        };


        object ZIPload {
            name dishwasher;
            parent house;

            object player {
                property base_power;
                file "dishwasher_consumption.csv";
                loop 1;
            };

            heatgain_fraction 0.1;
            power_pf 0.95;
            impedance_fraction 0.1;
            current_fraction 0.0;
            power_fraction 0.9;
            is_240 True;
        };

        object ZIPload {
            name washing_machine;
            parent house;

            object player {
                property base_power;
                file "washing_machine_consumption.csv";
                loop 1;
            };

            heatgain_fraction 0.05;
            power_pf 0.95;
            impedance_fraction 0.1;
            current_fraction 0.0;
            power_fraction 0.9;
            is_240 True;
        };


        // Refrigerator - always included with yearly schedule
        object ZIPload {
            name refrigerator;
            parent house;
            base_power yearly_refrigerator*0.15;
            heatgain_fraction 0.90;
            power_pf 0.80;
            impedance_fraction 0.10;
            current_fraction 0.60;
            power_fraction 0.30;
            is_240 FALSE;
        };

        object multi_recorder {
            property house:total_load,house:hvac_load,refrigerator:base_power,dishwasher:base_power,washing_machine:base_power,misc_appliances:base_power,indoor_lights:power.real,exterior_lights:power.real,main_wh:power.real,house:hvac_power.real,house:air_temperature,house:outdoor_temperature,house:hvac_last_on,house:hvac_duty_cycle,house:cooling_demand,house:heating_demand,house:heating_setpoint,house:cooling_setpoint,house:system_mode,main_wh:water_demand,meter1:measured_real_energy,meter1:measured_real_power,inverter1:P_Out,inverter1:Q_Out,house_solar:P_Out.real;
            file "results_3f29c3b1.csv";
            interval 900;
            limit 999999;
        };
    };
}
