module tape;
module residential {
    implicit_enduses NONE;
};
module powerflow;
module climate;

#include "typical_light_yearly.glm";
module generators;

clock {
    timezone PST+8DT;
    starttime '2024-01-01 00:00:00';
    stoptime '2024-01-05 00:00:00';
}


object csv_reader {
    name climate_reader_6b6b89a8;
    filename "zagreb.csv";
}

object climate {
    tmyfile "zagreb.csv";
    reader climate_reader_6b6b89a8;
};


schedule wh_demand {

    * 0-4 * * * 0;

    0-9 5 * * * 1;

    10-59 5 * * * 0;

    * 6 * * * 0.5;

    0-29 7 * * * 1;

    30-59 7 * * * 0.5;

    * 8-17 * * * 0;

    0-14 18 * * * 0.8;

    15-29 18 * * * 1;

    30-59 18 * * * 0.5;

    * 19-20 * * * 0.3;

    0-29 21 * * * 0.5;

    30-59 21 * * * 0;

    * 22-23 * * * 0;

}


object triplex_meter {
    name meter1;
    phases AS;
    nominal_voltage 120;


    object inverter {
        name inverter1;
        phases S;
        parent meter1;
        inverter_type FOUR_QUADRANT;
        power_factor 1.0;

        object solar {
            name house_solar;
            parent inverter1;
            generator_mode SUPPLY_DRIVEN;
            generator_status ONLINE;
            panel_type SINGLE_CRYSTAL_SILICON;
            efficiency 0.2;
            area 53.8195;
        };
    };


    object house {
        name house;
        heating_setpoint 63.0;
        cooling_setpoint 77.0;
        system_mode OFF;
        cooling_system_type ELECTRIC;
        // design_cooling_setpoint 82.4;
        design_cooling_capacity 12000 Btu/h ;
        heating_system_type HEAT_PUMP;
        //design_heating_setpoint 64.4;
        auxiliary_system_type ELECTRIC;
        fan_type ONE_SPEED;
        auxiliary_heat_capacity 24000 Btu/h;
        cooling_COP 0.5;
        heating_COP 0.5;


        design_heating_capacity 12000 Btu/h;
        thermostat_deadband 1;
        floor_area 1625.3489;
        number_of_stories 3;
        ceiling_height 9.84252;
        envelope_UA 1.648911;
        window_wall_ratio 0.41;
        number_of_doors 2;
        Rwall 32.241177314;
        Rwindows 26.869540516000004;
        Rroof 29.015923930000003;
        Rfloor 12.895335273;
        glazing_layers 2;


        object waterheater {
            name main_wh;
            tank_volume 39.625800000000005;
            tank_UA 5.6859;
            tank_setpoint 131.0;
            heating_element_capacity 2;
            location INSIDE;
            heat_mode ELECTRIC;
            water_demand wh_demand*1;
            impedance_fraction 0.7;
            power_fraction 0.3;
            power_factor 1.0;
        };


        object ZIPload {
            name indoor_lights;
            parent house;
            base_power yearly_lighting*0.6;
            power_pf 0.95;
            heatgain_fraction 1.0;
            impedance_fraction 0.0;
            current_fraction 0.0;
            power_fraction 1.0;
            is_240 FALSE;
        };

        object ZIPload {
            name exterior_lights;
            parent house;
            base_power yearly_lighting*0.1;
            power_pf 0.95;
            heatgain_fraction 1.0;
            impedance_fraction 0.0;
            current_fraction 0.0;
            power_fraction 1.0;
            is_240 FALSE;
        };


        object ZIPload {
            name oven;
            parent house;

            base_power 3.500;

            heatgain_fraction 0.3;
            power_pf 0.95;
            impedance_fraction 0.05;
            current_fraction 0.05;
            power_fraction 0.9;
            is_240 TRUE;
        };

        object ZIPload {
            name refrigerator;
            parent house;

            base_power 0.150;

            heatgain_fraction 0.9;
            power_pf 0.95;
            impedance_fraction 0.1;
            current_fraction 0.1;
            power_fraction 0.8;
            is_240 FALSE;
        };

        object ZIPload {
            name dishwasher;
            parent house;

            object player {
                property base_power;
                file "dishwasher_consumption.csv";
                loop 1;
            };

            heatgain_fraction 0.1;
            power_pf 0.95;
            impedance_fraction 0.1;
            current_fraction 0.0;
            power_fraction 0.9;
            is_240 True;
        };

        object ZIPload {
            name washing_machine;
            parent house;

            object player {
                property base_power;
                file "washing_machine_consumption.csv";
                loop 1;
            };

            heatgain_fraction 0.05;
            power_pf 0.95;
            impedance_fraction 0.1;
            current_fraction 0.0;
            power_fraction 0.9;
            is_240 True;
        };


        object multi_recorder {
            property house:total_load,house:hvac_load,house:air_temperature,house:outdoor_temperature,meter1:measured_real_energy,meter1:measured_real_power,inverter1:P_Out,house_solar:P_Out,main_wh:power.real,main_wh:tank_setpoint,main_wh:water_demand,washing_machine:base_power,dishwasher:base_power,oven:base_power,refrigerator:base_power,indoor_lights:power.real,exterior_lights:power.real, house:hvac_power.real, house:hvac_last_on, house:hvac_duty_cycle, house:cooling_demand, house:heating_demand, meter1:measured_real_energy, meter1:measured_reactive_power, house:heating_setpoint, house:cooling_setpoint, house:system_mode ;
            file "results_6b6b89a8.csv";
            interval 60;
            limit 10080;
        };
    };
}
